*Heading
** Job name: GG1_dano Model name: GG1_dano
** Generated by: Abaqus/CAE 2022
*Preprint, echo=NO, model=NO, history=NO, contact=NO
**
** PARTS
**
*Part, name=GG1
*Node
      1,   2271.86157,  -678.487549,    3.1500001
      2,   2271.86157,  -657.487549,    3.1500001
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*Element, type=C3D8R
  1,   487,  4821, 17031,  4813,     1,   377,  4713,   430
  2,  4821,  4822, 17032, 17031,   377,   378,  4714,  4713
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*Nset, nset=set_Ysym
    89,    90,    93,    96,   105,   106
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*Elset, elset=set_Ysym
  2653,  2654,  2655,  2656,  2657,  2658
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*Nset, nset=set_fixend
    17,    20,    23,    24,    45,    46
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*Elset, elset=set_fixend
   469,   472,   475,   478,   481,   484
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*Nset, nset=set_loadend
    11,    12,    14,    15,    59,    60
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*Elset, elset=set_loadend
   287,   288,   289,   290,   291,   292
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*Nset, nset=_PickedSet29, internal, generate
     1,  28370,      1
*Elset, elset=_PickedSet29, internal, generate
     1,  18960,      1
** Section: Section-1
*Solid Section, elset=_PickedSet29, controls=EC-1, material=mat_GG1
,
*End Part
**
**
** ASSEMBLY
**
*Assembly, name=Assembly
**
*Instance, name=GG1-1, part=GG1
-2154.863654,   609.824702,           0.
*End Instance
**
*End Assembly
**
** ELEMENT CONTROLS
**
*Section Controls, name=EC-1, ELEMENT DELETION=YES
1., 1., 1.
**
** MATERIALS
**
*Material, name=mat_GG1
*Damage Initiation, criterion=DUCTILE
 0.0586072, 0.333333,       0.
*Damage Evolution, type=DISPLACEMENT
 0.0586072,
*Elastic
1270., 0.3
*Plastic
    1.,        0.
   3.2, 0.0002024
  5.93, 0.0007604
  8.31, 0.0015984
 10.38, 0.0026605
 12.22, 0.0039045
 13.86, 0.0052978
 15.33, 0.0068148
 16.67, 0.0084355
 17.88, 0.0101436
 18.99, 0.0119258
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 31.71, 0.0586072
**
** BOUNDARY CONDITIONS
**
** Name: BC_Ysym Type: Symmetry/Antisymmetry/Encastre
*Boundary
GG1-1.set_Ysym, YSYMM
** Name: BC_fixend Type: Symmetry/Antisymmetry/Encastre
*Boundary
GG1-1.set_fixend, PINNED
** Name: BC_loadend Type: Velocity/Angular velocity
*Boundary, type=VELOCITY
GG1-1.set_loadend, 1, 1
** ----------------------------------------------------------------
**
** STEP: load
**
*Step, name=load, nlgeom=YES, inc=200, unsymm=YES
*Static, stabilize, factor=0.002, allsdtol=0, continue=NO
0.5, 40., 1e-05, 1.
**
** BOUNDARY CONDITIONS
**
** Name: BC_loadend Type: Velocity/Angular velocity
*Boundary, type=VELOCITY
GG1-1.set_loadend, 1, 1, 0.52
**
** OUTPUT REQUESTS
**
*Restart, write, frequency=0
**
** FIELD OUTPUT: F-Output-1
**
*Output, field
*Node Output
CF, RF, U
*Element Output, directions=YES
LE, PE, PEEQ, PEMAG, S, STATUS
*Contact Output
CDISP, CSTRESS
**
** HISTORY OUTPUT: H-Output-1
**
*Output, history, variable=PRESELECT
*End Step
