*Heading
** Job name: GG2_damage Model name: GG2_damage
** Generated by: Abaqus/CAE 2022
*Preprint, echo=NO, model=NO, history=NO, contact=NO
**
** PARTS
**
*Part, name=SS40
*Node
      1,  -1002.62384,  -167.289093,   4.69999981
      2,  -1002.62384,  -167.289093,   1.10000002
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*Element, type=C3D8R
  1,   454,  3537, 11591,  3505,     1,   377,  3409,   414
  2,  3537,  3538, 11592, 11591,   377,   378,  3410,  3409
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*Nset, nset=set_Ysym
   89,   90,   93,   96,  109,  110
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*Elset, elset=set_Ysym
 1565, 1566, 1567, 1568, 1569, 1570
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*Nset, nset=_PickedSet29, internal, generate
     1,  18718,      1
*Elset, elset=_PickedSet29, internal, generate
     1,  12324,      1
*Nset, nset=set_fixend
    33,    34,    37,    40,    45,    46
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*Elset, elset=set_fixend
   545,   546,   547,   548,   549,   550
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*Nset, nset=set_loadend
   27,   28,   30,   31,   75,   76
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*Elset, elset=set_loadend
  426,  427,  428,  429,  430,  431
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** Section: Section-1
*Solid Section, elset=_PickedSet29, controls=EC-1, material=mat_SS40
,
*End Part
**
**
** ASSEMBLY
**
*Assembly, name=Assembly
**
*Instance, name=SS40-1, part=SS40
 1037.823848,   109.289094,           0.
*End Instance
**
*End Assembly
**
** ELEMENT CONTROLS
**
*Section Controls, name=EC-1, ELEMENT DELETION=YES, MAX DEGRADATION=0.98, hourglass=ENHANCED
1., 1., 1.
**
** MATERIALS
**
*Material, name=mat_SS40
*Damage Initiation, criterion=DUCTILE
 0.0427247, 0.333333,       0.
*Damage Evolution, type=DISPLACEMENT
 0.0427247,
*Elastic
1190., 0.3
*Plastic
    1.,        0.
  3.06,  8.21e-05
  5.93, 0.0003205
  8.62, 0.0006989
 11.15, 0.0012032
 13.54,  0.001821
  15.8, 0.0025415
 17.94, 0.0033552
 19.97, 0.0042534
 21.91, 0.0052287
 23.75, 0.0062744
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  52.1, 0.0427247
**
** BOUNDARY CONDITIONS
**
** Name: BC_Ysym Type: Symmetry/Antisymmetry/Encastre
*Boundary
SS40-1.set_Ysym, YSYMM
** Name: BC_fixend Type: Symmetry/Antisymmetry/Encastre
*Boundary
SS40-1.set_fixend, PINNED
** Name: BC_loadend Type: Velocity/Angular velocity
*Boundary, type=VELOCITY
SS40-1.set_loadend, 1, 1
** ----------------------------------------------------------------
**
** STEP: load
**
*Step, name=load, nlgeom=YES, inc=500, unsymm=YES
*Static, stabilize, factor=0.01, allsdtol=0, continue=NO
0.5, 40., 1e-05, 1.
**
** BOUNDARY CONDITIONS
**
** Name: BC_loadend Type: Velocity/Angular velocity
*Boundary, type=VELOCITY
SS40-1.set_loadend, 1, 1, 0.44
**
** OUTPUT REQUESTS
**
*Restart, write, frequency=0
**
** FIELD OUTPUT: F-Output-1
**
*Output, field
*Node Output
CF, RF, U
*Element Output, directions=YES
LE, PE, PEEQ, PEMAG, S, STATUS
*Contact Output
CDISP, CSTRESS
**
** HISTORY OUTPUT: H-Output-1
**
*Output, history, variable=PRESELECT
*End Step
