*Heading
** Job name: GG3_damage2 Model name: GG3_damage2
** Generated by: Abaqus/CAE 2022
*Preprint, echo=NO, model=NO, history=NO, contact=NO
**
** PARTS
**
*Part, name=PGG3
*Node
      1,   329.841583,  -115.210991,           0.
      2,   329.841583,  -110.459694,           0.
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*Element, type=C3D8R
 1,  154, 2899, 6969, 2879,    1,  141, 2875,    4
 2, 2899,  164, 2889, 6969,  141,    2,  142, 2875
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*Nset, nset=set_fixend
  129,  130,  131,  132, 2635, 2636
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*Elset, elset=set_fixend, generate
 3142,  3258,     1
*Nset, nset=set_Ysym
   29,   30,   31,   32,   33,   34
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*Elset, elset=set_Ysym
  112,  113,  114,  118,  119,  120
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*Nset, nset=set_loadend
  137,  138,  139,  140, 2801, 2802
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*Elset, elset=set_loadend, generate
 3844,  3960,     1
*Nset, nset=_PickedSet34, internal, generate
    1,  8018,     1
*Elset, elset=_PickedSet34, internal, generate
    1,  3960,     1
** Section: Section-1
*Solid Section, elset=_PickedSet34, controls=EC-1, material=mat_GG3
,
*End Part
**
**
** ASSEMBLY
**
*Assembly, name=Assembly
**
*Instance, name=PGG3-1, part=PGG3
 -153.841565,   209.304256,           0.
*End Instance
**
*End Assembly
**
** ELEMENT CONTROLS
**
*Section Controls, name=EC-1, ELEMENT DELETION=YES
1., 1., 1.
**
** MATERIALS
**
*Material, name=mat_GG3
*Damage Initiation, criterion=DUCTILE
 0.0880075, 0.333333,       0.
*Damage Evolution, type=DISPLACEMENT
 0.137224,
*Elastic
1200., 0.3
*Plastic
    1.,        0.
  3.74, 0.0003517
  7.23,  0.000904
 10.49, 0.0016338
 13.54, 0.0025216
 16.41, 0.0035501
 19.12, 0.0047047
 21.68, 0.0059724
  24.1, 0.0073418
 26.39, 0.0088029
 28.58, 0.0103469
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 72.35, 0.0880075
**
** BOUNDARY CONDITIONS
**
** Name: BC_Ysym Type: Symmetry/Antisymmetry/Encastre
*Boundary
PGG3-1.set_Ysym, YSYMM
** Name: BC_fixend Type: Symmetry/Antisymmetry/Encastre
*Boundary
PGG3-1.set_fixend, PINNED
** Name: BC_load Type: Velocity/Angular velocity
*Boundary, type=VELOCITY
PGG3-1.set_loadend, 1, 1
** ----------------------------------------------------------------
**
** STEP: load
**
*Step, name=load, nlgeom=YES, inc=200, unsymm=YES
*Static, stabilize, factor=0.002, allsdtol=0, continue=NO
0.5, 35., 1e-05, 1.
**
** BOUNDARY CONDITIONS
**
** Name: BC_load Type: Velocity/Angular velocity
*Boundary, type=VELOCITY
PGG3-1.set_loadend, 1, 1, 1.06667
**
** OUTPUT REQUESTS
**
*Restart, write, frequency=0
**
** FIELD OUTPUT: F-Output-1
**
*Output, field
*Node Output
CF, RF, U
*Element Output, directions=YES
LE, PE, PEEQ, PEMAG, S, STATUS
*Contact Output
CDISP, CSTRESS
**
** HISTORY OUTPUT: H-Output-1
**
*Output, history, variable=PRESELECT
*End Step
